# OpenSim document version 40500
MarkerSet:
  Marker HeadL: torso (0.033 0.57 -0.066) fixed=true
  Marker HeadR: torso (0.033 0.57 0.066) fixed=true
  Marker HeadFront: torso (0.09 0.59 0) fixed=true
  Marker Chest: torso (0.05 0.372 0) fixed=true
  Marker SpineThoracic2: torso (-0.07 0.415 0) fixed=true
  Marker SpineThoracic12: torso (-0.07428778 0.113 0.00085787)
  Marker WaistBack: pelvis (-0.1557 0.03964474 0) fixed=true
  Marker LShoulderTop: torso (-0.03 0.44 -0.15) fixed=true
  Marker RShoulderTop: torso (-0.03 0.44 0.15) fixed=true
  Marker WaistLFront: pelvis (0.02 0.03 -0.128) fixed=true
  Marker WaistRFront: pelvis (0.02 0.03 0.128) fixed=true
  Marker WaistL: pelvis (-0.0179257 0.0641741 -0.128748) fixed=true
  Marker WaistR: pelvis (-0.01792572 0.0641741 0.128748) fixed=true
  Marker LThighFrontLow: femur_l (0.05590728 -0.3241719 -0.01440573)
  Marker LKneeOut: femur_l (0 -0.404 -0.05) fixed=true
  Marker LKneeIn: femur_l (0 -0.404 0.05)
  Marker LShinFrontHigh: tibia_l (0.05 -0.083 0)
  Marker LAnkleOut: tibia_l (-0.005 -0.41 -0.053) fixed=true
  Marker LHeelBack: calcn_l (-0.02 0.02 0.005) fixed=true
  Marker LForefoot2: calcn_l (0.176 0.012 -0.0025) fixed=true
  Marker LForefoot5: calcn_l (0.142 0.012 -0.045) fixed=true
  Marker RThighFrontLow: femur_r (0.0559073 -0.324172 0.0144057)
  Marker RKneeOut: femur_r (0 -0.404 0.05) fixed=true
  Marker RKneeIn: femur_r (0 -0.404 -0.05)
  Marker RShinFrontHigh: tibia_r (0.05 -0.083 0)
  Marker RAnkleOut: tibia_r (-0.005 -0.41 0.053) fixed=true
  Marker RHeelBack: calcn_r (-0.02 0.02 -0.005) fixed=true
  Marker RForefoot2: calcn_r (0.176 0.012 0.0025) fixed=true
  Marker RForefoot5: calcn_r (0.142 0.012 0.045) fixed=true
